OpenVSP model (file version 5), 1 components.
Geometry view with OpenVSP parameter names; values to 6 digits, angles in degrees, lengths in the model's unit.
Overall bounding box: X_Min=-0.0459369 X_Len=37.3818 Y_Min=-1.97576 Y_Len=3.95154 Z_Min=-1.30023 Z_Len=4.14473

Stack "fuselage"
  location (X Y Z) 0 0 0, rotation 0 0 0
  bounding box size 37.3818 3.95154 4.14473
  cross sections:
    n   XDelta     YDelta  ZDelta       shape
    0   0          0       0            ellipse Ellipse_Height=0.414926 Ellipse_Width=0.391634
    1   0.0879138  0       -0.00359146  file fuselage section Height=0.614542 Width=0.569851
    2   0.0297889  0       -0.00121694  file fuselage section Height=0.68218 Width=0.630238
    3   0.0889921  0       0.0162438    file fuselage section Height=0.844486 Width=0.810641
    4   0.147076   0       0.0202081    file fuselage section Height=1.05313 Width=0.99445
    5   0.203311   0       0.0232878    file fuselage section Height=1.31524 Width=1.24448
    6   0.256988   0       0.0479488    file fuselage section Height=1.60301 Width=1.52852
    7   0.307434   0       0.0436829    file fuselage section Height=1.91226 Width=1.82387
    8   0.354014   0       0.0665724    file fuselage section Height=2.23581 Width=2.15287
    9   0.396142   0       0.0668357    file fuselage section Height=2.57214 Width=2.47326
    10  0.433288   0       0.0834471    file fuselage section Height=2.90693 Width=2.81495
    11  0.464985   0       0.086074     file fuselage section Height=3.23564 Width=3.13154
    12  0.490835   0       0.0964788    file fuselage section Height=3.55274 Width=3.43833
    13  0.510512   0       0.0950865    file fuselage section Height=3.82228 Width=3.70986
    14  0.52377    0       0.0854127    file fuselage section Height=4.04135 Width=3.88779
    15  0.53044    0       0.0438378    file fuselage section Height=4.141 Width=3.9501
    16  5.3819     0       0            as above
    17  10.7638    0       0            as above
    18  5.3819     0       0            as above
    19  0.328052   0       0.00430058   file fuselage section Height=4.13214 Width=3.93929
    20  0.944588   0       0.025097     file fuselage section Height=4.08063 Width=3.88052
    21  1.44719    0       0.0823218    file fuselage section Height=3.90453 Width=3.67094
    22  1.77525    0       0.145802     file fuselage section Height=3.56793 Width=3.26994
    23  1.88918    0       0.186051     file fuselage section Height=3.08777 Width=2.70959
    24  1.77525    0       0.190391     file fuselage section Height=2.50475 Width=2.06109
    25  1.44719    0       0.158518     file fuselage section Height=1.86945 Width=1.41396
    26  0.944588   0       0.0943963    file fuselage section Height=1.25888 Width=0.855568
    27  0.328052   0       0.0419504    file fuselage section Height=0.859197 Width=0.553391
