OpenVSP model (file version 5), 1 components.
Geometry view with OpenVSP parameter names; values to 6 digits, angles in degrees, lengths in the model's unit.
Overall bounding box: X_Min=0 X_Len=8.56 Y_Min=-0.613828 Y_Len=1.22766 Z_Min=-0.450752 Z_Len=1.4526

Fuselage "FuselageGeom"
  location (X Y Z) 0 0 0, rotation 0 0 0
  bounding box size 8.56 1.22766 1.4526
  Design: Length=8.56
  cross sections:
    n  XLocPercent  YLocPercent  ZLocPercent   shape
    0  0            0            0             point
    1  0.159184     0            -0.000745376  edit curve Width=0.969388 Height=0.841116 AbsoluteFlag=0 SymType=0 cubic Bezier points (X Y): 0.5 0, 0.5 -0.276667, 0.276667 -0.216135, 0 -0.216135, -0.348684 -0.242072, -0.5 -0.276667, -0.5 0, -0.5 0.276667, -0.276667 0.5, 0 0.5, 0.276667 0.5, 0.5 0.276667, 0.5 0
    2  0.292831     0            0             edit curve Width=1.17347 Height=1.72351 AbsoluteFlag=0 SymType=0 cubic Bezier points (X Y): 0.5 0, 0.5 -0.276667, 0.287986 -0.23891, 0.0113192 -0.23891, -0.265347 -0.23891, -0.5 -0.276667, -0.5 0, -0.5 0.276667, -0.276667 0.462833, 0 0.462833, 0.276667 0.462833, 0.5 0.276667, 0.5 0
    3  0.404159     0            0.002         edit curve Width=1.22449 Height=1.91651 AbsoluteFlag=0 SymType=0 cubic Bezier points (X Y): 0.5 0, 0.5 -0.276667, 0.276667 -0.228319, 0 -0.228319, -0.276667 -0.228319, -0.5 -0.276667, -0.5 0, -0.5 0.276667, -0.276667 0.5, 0 0.5, 0.276667 0.5, 0.5 0.276667, 0.5 0
    4  0.538764     0            0.004         edit curve Width=1.03936 Height=1.61925 AbsoluteFlag=0 SymType=0 cubic Bezier points (X Y): 0.5 0, 0.5 -0.276667, 0.271282 -0.230263, -0.0053842 -0.230263, -0.282051 -0.230263, -0.5 -0.276667, -0.5 0, -0.5 0.276667, -0.276667 0.5, 0 0.5, 0.276667 0.5, 0.5 0.276667, 0.5 0
    5  0.656797     0            0.008         edit curve Width=0.451895 Height=1.04198 AbsoluteFlag=0 SymType=0 cubic Bezier points (X Y): 0.5 0, 0.5 -0.276667, 0.26863 -0.253289, -0.00803709 -0.253289, -0.284704 -0.253289, -0.5 -0.276667, -0.5 0, -0.5 0.276667, -0.276667 0.5, 0 0.5, 0.276667 0.5, 0.5 0.276667, 0.5 0
    6  0.748316     0            0.008         edit curve Width=0.316327 Height=0.547677 AbsoluteFlag=0 SymType=0 cubic Bezier points (X Y): 0.5 0, 0.5 -0.276667, 0.262564 -0.25, -0.0141027 -0.25, -0.290769 -0.25, -0.5 -0.276667, -0.5 0, -0.5 0.276667, -0.276667 0.5, 0 0.5, 0.276667 0.5, 0.5 0.276667, 0.5 0
    7  0.830403     0            0.012         edit curve Width=0.256143 Height=0.357343 AbsoluteFlag=0 SymType=0 cubic Bezier points (X Y): 0.5 0, 0.5 -0.276667, 0.271592 -0.269737, -0.00507431 -0.269737, -0.281741 -0.269737, -0.5 -0.276667, -0.5 0, -0.5 0.276667, -0.276667 0.5, 0 0.5, 0.276667 0.5, 0.5 0.276667, 0.5 0
    8  0.91875      0            0.013648      edit curve Width=0.204082 Height=0.190338 AbsoluteFlag=0 SymType=0 cubic Bezier points (X Y): 0.5 0, 0.5 -0.276667, 0.270088 -0.253943, -0.00657895 -0.253943, -0.283246 -0.253943, -0.5 -0.276667, -0.5 0, -0.5 0.276667, -0.276667 0.5, 0 0.5, 0.276667 0.5, 0.5 0.276667, 0.5 0
    9  1            0            0.0164541     point
