OpenVSP model (file version 5), 4 components.
Geometry view with OpenVSP parameter names; values to 6 digits, angles in degrees, lengths in the model's unit.
Overall bounding box: X_Min=0 X_Len=22.86 Y_Min=-2.57268 Y_Len=5.14535 Z_Min=-0.962365 Z_Len=3.03136

Fuselage "fuselage"
  location (X Y Z) 0 0 0, rotation 0 0 0
  bounding box size 22.86 5.14535 2.63336
  Design: Length=22.86
  cross sections:
    n   XLocPercent  YLocPercent  ZLocPercent  shape
    0   0            0            -0.00204918  point
    1   0.0541268    0            0.00204918   edit curve Width=1.84426 Height=0.84898 AbsoluteFlag=0 SymType=0 cubic Bezier points (X Y): 0.5 0, 0.5 -0.276667, 0.276667 -0.5, 0 -0.5, -0.276667 -0.5, -0.5 -0.276667, -0.5 0, -0.5 0.276667, -0.279956 0.464954, -0.00328947 0.464954, 0.273377 0.464954, 0.5 0.276667, 0.5 0
    2   0.134765     0            0.00614754   edit curve Width=2.6127 Height=1.33085 AbsoluteFlag=0 SymType=0 cubic Bezier points (X Y): 0.5 0, 0.5 -0.276667, 0.276667 -0.5, 0 -0.5, -0.276667 -0.5, -0.5 -0.276667, -0.5 0, -0.5 0.276667, -0.270088 0.617929, 0.00657895 0.617929, 0.283246 0.617929, 0.5 0.276667, 0.5 0
    3   0.210867     0            0.00307377   edit curve Width=3.32992 Height=1.52911 AbsoluteFlag=0 SymType=0 cubic Bezier points (X Y): 0.5 0, 0.5 -0.276667, 0.276667 -0.5, 0 -0.5, -0.276667 -0.5, -0.5 -0.276667, -0.5 0, -0.5 0.276667, -0.279956 0.962676, -0.00328947 0.962676, 0.273377 0.962676, 0.5 0.276667, 0.5 0
    4   0.261126     0            0.00614754   edit curve Width=3.79098 Height=1.75787 AbsoluteFlag=0 SymType=0 cubic Bezier points (X Y): 0.5 0, 0.5 -0.276667, 0.276667 -0.5, 0 -0.5, -0.276667 -0.5, -0.5 -0.276667, -0.5 0, -0.5 0.276667, -0.279956 0.851435, -0.00328947 0.851435, 0.273377 0.851435, 0.5 0.276667, 0.5 0
    5   0.387987     0            0            edit curve Width=5.12295 Height=1.85714 AbsoluteFlag=0 SymType=0 cubic Bezier points (X Y): 0.5 0, 0.5 -0.276667, 0.276667 -0.5, 0 -0.5, -0.276667 -0.5, -0.5 -0.276667, -0.5 0, -0.5 0.276667, -0.283246 0.792637, -0.00657895 0.792637, 0.270088 0.792637, 0.5 0.276667, 0.5 0
    6   0.458225     0            0.0102459    edit curve Width=4.30637 Height=2.36082 AbsoluteFlag=0 SymType=0 cubic Bezier points (X Y): 0.5 0, 0.5 -0.276667, 0.276667 -0.5, 0 -0.5, -0.276667 -0.5, -0.5 -0.276667, -0.5 0, -0.5 0.276667, -0.270088 0.47026, 0.00657895 0.47026, 0.283246 0.47026, 0.5 0.276667, 0.5 0
    7   0.598133     0            0            edit curve Width=4.30637 Height=1.80408 AbsoluteFlag=0 SymType=0 cubic Bezier points (X Y): 0.5 0, 0.5 -0.276667, 0.276667 -0.5, 0 -0.5, -0.276667 -0.5, -0.5 -0.276667, -0.5 0, -0.5 0.276667, -0.286535 0.583472, -0.00986842 0.583472, 0.266798 0.583472, 0.5 0.276667, 0.5 0
    8   0.75         0            0.00309917   general fuselage BotStr=0.83 BotTanAngle=90 CornerRad=0 Height=1.59836 LowStr=0.83 MaxWidthLoc=0 TopStr=0.83 TopTanAngle=90 UpStr=0.83 Width=4.21459
    9   0.861111     0            0.00516529   general fuselage BotStr=0.83 BotTanAngle=90 CornerRad=0 Height=1.27275 LowStr=0.83 MaxWidthLoc=0 TopStr=0.83 TopTanAngle=90 UpStr=0.83 Width=3.53484
    10  0.949591     0            0.00413223   edit curve Width=2.7459 Height=0.618117 AbsoluteFlag=0 SymType=0 cubic Bezier points (X Y): 0.5 0, 0.5 -0.276667, 0.276667 -0.5, 0 -0.5, -0.276667 -0.5, -0.5 -0.276667, -0.5 0, -0.5 0.276667, -0.279956 0.665221, -0.00328947 0.665221, 0.273377 0.665221, 0.5 0.276667, 0.5 0
    11  0.965992     0            0.00206612   general fuselage BotStr=0.83 BotTanAngle=90 CornerRad=0 Height=0.426121 LowStr=0.83 MaxWidthLoc=0 TopStr=0.83 TopTanAngle=90 UpStr=0.83 Width=2.56148
    12  1            0            -0.00206612  point

Stack "engine1", child of "fuselage"
  location (X Y Z) 10.082 0 1.39442, rotation 0 0 0
  bounding box size 11.8158 1.99237 1.77079
  cross sections:
    n  XDelta   YDelta  ZDelta     shape
    0  0        0       0          ellipse Ellipse_Height=0.970516 Ellipse_Width=1.30309
    1  1        0       -0.197368  ellipse Ellipse_Height=1.22574 Ellipse_Width=1.96032
    2  2        0       0          ellipse Ellipse_Height=0.969388 Ellipse_Width=1.96032
    3  2        0       -0.131579  ellipse Ellipse_Height=0.867347 Ellipse_Width=1.96032
    4  2        0       -0.131579  edit curve Width=1.96032 Height=0.7081 AbsoluteFlag=0 SymType=0 cubic Bezier points (X Y): 0.5 0, 0.5 -0.275958, 0.275958 -0.5, 0 -0.5, -0.275958 -0.5, -0.5 -0.275958, -0.5 0, -0.5 0.275958, -0.269379 0.591933, 0.00657895 0.591933, 0.282536 0.591933, 0.5 0.275958, 0.5 0
    5  2        0       -0.197368  edit curve Width=1.96032 Height=0.512287 AbsoluteFlag=0 SymType=0 cubic Bezier points (X Y): 0.5 0, 0.5 -0.275958, 0.275958 -0.5, 0 -0.5, -0.275958 -0.5, -0.5 -0.275958, -0.5 0, -0.5 0.275958, -0.266089 0.805602, 0.00986842 0.805602, 0.285826 0.805602, 0.5 0.275958, 0.5 0
    6  2.31579  0       -0.131579  ellipse Ellipse_Height=0.561224 Ellipse_Width=1.96032
    7  0.5      0       0          ellipse Ellipse_Height=0.323193 Ellipse_Width=0.65785

Stack "engine2", child of "engine1"
  location (X Y Z) 12.623 1.55378 0.936255, rotation 0 0 0
  bounding box size 7.47734 1.25942 1.2836
  cross sections:
    n  XDelta    YDelta  ZDelta     shape
    0  0         0       0          edit curve Width=0.916331 Height=0.478298 AbsoluteFlag=0 SymType=0 cubic Bezier points (X Y): 0.5 0, 0.5 -0.275958, 0.252931 -0.321403, -0.0230263 -0.321403, -0.298984 -0.321403, -0.5 -0.275958, -0.5 0, -0.5 0.275958, -0.275958 0.5, 0 0.5, 0.275958 0.5, 0.5 0.275958, 0.5 0
    1  0.934211  0       -0.197368  ellipse Ellipse_Height=0.824748 Ellipse_Width=1.18767
    2  2         0       -0.131579  ellipse Ellipse_Height=0.867347 Ellipse_Width=1.18767
    3  2         0       -0.131579  ellipse Ellipse_Height=0.82475 Ellipse_Width=1.18767
    4  2.54313   0       0.131579   ellipse Ellipse_Height=0.467417 Ellipse_Width=0.736627

Stack "engine3", child of "engine2"
  location (X Y Z) 12.623 -1.554 0.936255, rotation 0 0 0
  bounding box size 7.47734 1.25942 1.2836
  cross sections:
    n  XDelta    YDelta  ZDelta     shape
    0  0         0       0          edit curve Width=0.916331 Height=0.478298 AbsoluteFlag=0 SymType=0 cubic Bezier points (X Y): 0.5 0, 0.5 -0.275958, 0.252931 -0.321403, -0.0230263 -0.321403, -0.298984 -0.321403, -0.5 -0.275958, -0.5 0, -0.5 0.275958, -0.275958 0.5, 0 0.5, 0.275958 0.5, 0.5 0.275958, 0.5 0
    1  0.934211  0       -0.197368  ellipse Ellipse_Height=0.824748 Ellipse_Width=1.18767
    2  2         0       -0.131579  ellipse Ellipse_Height=0.867347 Ellipse_Width=1.18767
    3  2         0       -0.131579  ellipse Ellipse_Height=0.82475 Ellipse_Width=1.18767
    4  2.54313   0       0.131579   ellipse Ellipse_Height=0.467417 Ellipse_Width=0.736627
