OpenVSP model (file version 5), 3 components.
Geometry view with OpenVSP parameter names; values to 6 digits, angles in degrees, lengths in the model's unit.
Overall bounding box: X_Min=0 X_Len=9.4915 Y_Min=-1.01675 Y_Len=2.03349 Z_Min=-0.241878 Z_Len=1.25551

Fuselage "FuselageJ36_Concept"
  location (X Y Z) 0 0 0, rotation 0 0 0
  bounding box size 9.4915 2.03349 1.25551
  Design: Length=9.4915
  cross sections:
    n   XLocPercent  YLocPercent  ZLocPercent  shape
    0   0            0            0            edit curve Width=0 Height=0 AbsoluteFlag=0 SymType=0 cubic Bezier points (X Y): 0 0, 0 0, 0 0, 0 0, 0 0, 0 0, 0 0
    1   0.0633436    0            0            edit curve Width=0.603627 Height=0.545162 AbsoluteFlag=0 SymType=0 cubic Bezier points (X Y): 0.5 0, 0.5 -0.276667, 0.283246 -0.29764, 0.00657895 -0.29764, -0.328947 -0.29764, -0.565789 -0.21647, -0.565789 0.0601965, -0.565789 0.336863, -0.279956 0.338227, -0.00328947 0.338227, 0.273377 0.338227, 0.5 0.276667, 0.5 0
    2   0.102286     0            0.00180723   edit curve Width=0.813612 Height=0.483611 AbsoluteFlag=0 SymType=0 cubic Bezier points (X Y): 0.5 0, 0.5 -0.276667, 0.283246 -0.441441, 0.00657895 -0.441441, -0.270088 -0.441441, -0.5 -0.276667, -0.5 0, -0.5 0.276667, -0.270088 0.534596, 0.00657895 0.534596, 0.283246 0.534596, 0.5 0.276667, 0.5 0
    3   0.131486     0            0.00480769   edit curve Width=0.956938 Height=0.537918 AbsoluteFlag=0 SymType=0 cubic Bezier points (X Y): 0.5 0, 0.5 -0.276667, 0.276667 -0.5, 0 -0.5, -0.276667 -0.5, -0.5 -0.276667, -0.5 0, -0.5 0.276667, -0.270088 0.596232, 0.00657895 0.596232, 0.283246 0.596232, 0.5 0.276667, 0.5 0
    4   0.191602     0            0.0144231    edit curve Width=1.19617 Height=0.707127 AbsoluteFlag=0 SymType=0 cubic Bezier points (X Y): 0.5 0, 0.5 -0.276667, 0.276667 -0.5, 0 -0.5, -0.276667 -0.5, -0.5 -0.276667, -0.5 0, -0.5 0.276667, -0.286535 0.790821, -0.00986842 0.790821, 0.266798 0.790821, 0.5 0.276667, 0.5 0
    5   0.391069     0            0.00783133   edit curve Width=2.03349 Height=0.5756 AbsoluteFlag=0 SymType=0 cubic Bezier points (X Y): 0.5 0, 0.5 -0.276667, 0.276667 -0.5, 0 -0.5, -0.276667 -0.5, -0.5 -0.276667, -0.5 0, -0.5 0.276667, -0.276667 1.23232, 0 1.23232, 0.276667 1.23232, 0.5 0.276667, 0.5 0
    6   0.448152     0            0.00542169   edit curve Width=1.94378 Height=0.519672 AbsoluteFlag=0 SymType=0 cubic Bezier points (X Y): 0.5 0, 0.5 -0.276667, 0.276667 -0.5, 0 -0.5, -0.276667 -0.5, -0.5 -0.276667, -0.5 0, -0.5 0.276667, -0.283246 1.8515, -0.00657895 1.8515, 0.270088 1.8515, 0.5 0.276667, 0.5 0
    7   0.571546     0            0.0331325    general fuselage BotStr=0.83 BotTanAngle=90 CornerRad=0 Height=1.11271 LowStr=0.83 MaxWidthLoc=0 TopStr=0.83 TopTanAngle=90 UpStr=0.83 Width=1.94378
    8   0.764609     0            0.0138554    edit curve Width=1.94378 Height=0.671448 AbsoluteFlag=0 SymType=0 cubic Bezier points (X Y): 0.5 0, 0.5 -0.276667, 0.276667 -0.5, 0 -0.5, -0.276667 -0.5, -0.5 -0.276667, -0.5 0, -0.5 0.276667, -0.286535 0.857338, -0.00986842 0.857338, 0.266798 0.857338, 0.5 0.276667, 0.5 0
    9   0.893365     0            0.013253     edit curve Width=1.34999 Height=0.32901 AbsoluteFlag=0 SymType=0 cubic Bezier points (X Y): 0.5 0, 0.5 -0.276667, 0.276667 -0.5, 0 -0.5, -0.276667 -0.5, -0.5 -0.276667, -0.5 0, -0.5 0.276667, -0.279956 1.19977, -0.00328947 1.19977, 0.273377 1.19977, 0.5 0.276667, 0.5 0
    10  0.964541     0            0.023494     edit curve Width=0.777512 Height=0.145398 AbsoluteFlag=0 SymType=0 cubic Bezier points (X Y): 0.5 0, 0.5 -0.276667, 0.276667 -0.5, 0 -0.5, -0.276667 -0.5, -0.5 -0.276667, -0.5 0, -0.5 0.276667, -0.279956 1.19977, -0.00328947 1.19977, 0.273377 1.19977, 0.5 0.276667, 0.5 0
    11  1            0            0.0289157    general fuselage BotStr=0.83 BotTanAngle=90 CornerRad=0 Height=0 LowStr=0.83 MaxWidthLoc=0 TopStr=0.83 TopTanAngle=90 UpStr=0.83 Width=0

Stack "engine2"
  location (X Y Z) 3.93443 -0.409836 0.655738, rotation 0 0 0
  bounding box size 3.89474 0.727763 0.605756
  cross sections:
    n  XDelta   YDelta  ZDelta     shape
    0  0        0       0          circle Circle_Diameter=0
    1  1        0       0          ellipse Ellipse_Height=0.438151 Ellipse_Width=0.583673
    2  2.39474  0       -0.131579  ellipse Ellipse_Height=0.510204 Ellipse_Width=0.636735
    3  0.5      0       0.0657895  ellipse Ellipse_Height=0.19084 Ellipse_Width=0.540738

Stack "engine1", child of "engine2"
  location (X Y Z) 3.93443 0.409836 0.655738, rotation 0 0 0
  bounding box size 3.89474 0.727763 0.605756
  cross sections:
    n  XDelta   YDelta  ZDelta     shape
    0  0        0       0          circle Circle_Diameter=0
    1  1        0       0          ellipse Ellipse_Height=0.438151 Ellipse_Width=0.583673
    2  2.39474  0       -0.131579  ellipse Ellipse_Height=0.510204 Ellipse_Width=0.636735
    3  0.5      0       0.0657895  ellipse Ellipse_Height=0.19084 Ellipse_Width=0.540738
