OpenVSP model (file version 5), 1 components.
Geometry view with OpenVSP parameter names; values to 6 digits, angles in degrees, lengths in the model's unit.
Overall bounding box: X_Min=0 X_Len=8.7 Y_Min=-0.726554 Y_Len=1.45311 Z_Min=-0.690212 Z_Len=1.38042

Fuselage "FuselageGeom"
  location (X Y Z) 0 0 0, rotation 0 0 0
  bounding box size 8.7 1.45311 1.38042
  Design: Length=8.7
  cross sections:
    n   XLocPercent  YLocPercent  ZLocPercent  shape
    0   0            0            -0.0405805   point
    1   0.0717415    0            -0.0283207   general fuselage BotStr=0.83 BotTanAngle=90 CornerRad=0 Height=0.701041 LowStr=0.83 MaxWidthLoc=0 TopStr=0.83 TopTanAngle=90 UpStr=0.83 Width=0.675266
    2   0.129681     0            -0.0182587   general fuselage BotStr=0.83 BotTanAngle=90 CornerRad=0 Height=0.968831 LowStr=0.83 MaxWidthLoc=0 TopStr=0.83 TopTanAngle=90 UpStr=0.83 Width=0.983939
    3   0.184961     0            -0.0101451   general fuselage BotStr=0.83 BotTanAngle=90 CornerRad=0 Height=1.14878 LowStr=0.83 MaxWidthLoc=0 TopStr=0.83 TopTanAngle=90 UpStr=0.83 Width=1.19396
    4   0.240241     0            -0.00297299  general fuselage BotStr=0.83 BotTanAngle=90 CornerRad=0 Height=1.26868 LowStr=0.83 MaxWidthLoc=0 TopStr=0.83 TopTanAngle=90 UpStr=0.83 Width=1.36743
    5   0.288934     0            0            general fuselage BotStr=0.83 BotTanAngle=90 CornerRad=0 Height=1.32653 LowStr=0.83 MaxWidthLoc=0 TopStr=0.83 TopTanAngle=90 UpStr=0.83 Width=1.45026
    6   0.47232      0            0            general fuselage BotStr=0.83 BotTanAngle=90 CornerRad=0 Height=1.38042 LowStr=0.83 MaxWidthLoc=0 TopStr=0.83 TopTanAngle=90 UpStr=0.83 Width=1.45026
    7   0.578938     0            0            general fuselage BotStr=0.83 BotTanAngle=90 CornerRad=0 Height=1.078 LowStr=0.83 MaxWidthLoc=0 TopStr=0.83 TopTanAngle=90 UpStr=0.83 Width=1.03954
    8   0.670907     0            0            general fuselage BotStr=0.83 BotTanAngle=90 CornerRad=0 Height=0.881372 LowStr=0.83 MaxWidthLoc=0 TopStr=0.83 TopTanAngle=90 UpStr=0.83 Width=0.842774
    9   0.801735     0            0            general fuselage BotStr=0.83 BotTanAngle=90 CornerRad=0 Height=0.657726 LowStr=0.83 MaxWidthLoc=0 TopStr=0.83 TopTanAngle=90 UpStr=0.83 Width=0.612245
    10  0.919551     0            0            general fuselage BotStr=0.83 BotTanAngle=90 CornerRad=0 Height=0.435009 LowStr=0.83 MaxWidthLoc=0 TopStr=0.83 TopTanAngle=90 UpStr=0.83 Width=0.408163
    11  0.974283     0            0            general fuselage BotStr=0.83 BotTanAngle=90 CornerRad=0 Height=0.289699 LowStr=0.83 MaxWidthLoc=0 TopStr=0.83 TopTanAngle=90 UpStr=0.83 Width=0.291545
    12  1            0            0            point
