OpenVSP model (file version 5), 1 components.
Geometry view with OpenVSP parameter names; values to 6 digits, angles in degrees, lengths in the model's unit.
Overall bounding box: X_Min=0 X_Len=9.2 Y_Min=-0.425 Y_Len=0.85 Z_Min=-0.778487 Z_Len=1.50346

Fuselage "fuselage"
  location (X Y Z) 0 0 0, rotation 0 0 0
  bounding box size 9.2 0.85 1.50346
  Design: Length=9.2
  cross sections:
    n  XLocPercent  YLocPercent  ZLocPercent  shape
    0  0            0            0            point
    1  0.07174      0            0            circle Circle_Diameter=0.66
    2  0.1587       0            -0.0163      ellipse Ellipse_Height=1.13 Ellipse_Width=0.8
    3  0.39674      0            -0.01739     ellipse Ellipse_Height=1.21 Ellipse_Width=0.85
    4  0.45652      0            -0.01739     edit curve Width=0.825 Height=1.21 AbsoluteFlag=0 SymType=0 cubic Bezier points (X Y): 0.5 0, 0.5 -0.275958, 0.275958 -0.5, 0 -0.5, -0.275958 -0.5, -0.5 -0.275958, -0.5 0, -0.500274 0.269178, -0.275958 0.704795, 0 0.704795, 0.275958 0.704795, 0.5 0.275958, 0.5 0
    5  0.49457      0            -0.01739     edit curve Width=0.8 Height=1.21 AbsoluteFlag=0 SymType=0 cubic Bezier points (X Y): 0.5 0, 0.5 -0.275958, 0.275958 -0.5, 0 -0.5, -0.275958 -0.5, -0.5 -0.275958, -0.5 0, -0.5 0.275958, -0.282173 0.676027, -0.00621575 0.676027, 0.269742 0.676027, 0.5 0.275958, 0.5 0
    6  0.8581       0            0.00272      ellipse Ellipse_Height=0.75 Ellipse_Width=0.35
    7  1            0            0.00652      ellipse Ellipse_Height=0.45 Ellipse_Width=0

VSPAERO settings: Sref=22.49 bref=11.23 cref=1.995 Xcg=3.95268 Ycg=-9.57736e-05 Zcg=-0.0964961 AlphaStart=0 AlphaEnd=10 AlphaNpts=3 BetaStart=0 BetaEnd=0 BetaNpts=1 MachStart=0.45 MachEnd=0 MachNpts=1 ReCref=1e+07 Vinf=100 Rho=0.002377
