OpenVSP model (file version 5), 1 components.
Geometry view with OpenVSP parameter names; values to 6 digits, angles in degrees, lengths in the model's unit.
Overall bounding box: X_Min=11.9641 X_Len=2.995 Y_Min=-7.12085 Y_Len=2.24176 Z_Min=-2.49817 Z_Len=2.24234

Stack "Nacelle 1"
  location (X Y Z) 11.9641 -6 -1.37039, rotation 0 0 0
  bounding box size 2.995 2.24176 2.24234
  cross sections:
    n   XDelta      YDelta  ZDelta        shape
    0   0           0       0             circle Circle_Diameter=1.82077
    1   0.00641252  0       0             circle Circle_Diameter=1.82481
    2   0.0192101   0       0             circle Circle_Diameter=1.83692
    3   0.0319254   0       0             circle Circle_Diameter=1.85701
    4   0.0445041   0       0             circle Circle_Diameter=1.88488
    5   0.0568921   0       0             circle Circle_Diameter=1.9201
    6   0.0690365   0       0             circle Circle_Diameter=1.96194
    7   0.0808853   0       0             circle Circle_Diameter=2.00913
    8   0.0923878   0       0             circle Circle_Diameter=2.05979
    9   0.154751    0       -3.40169e-05  circle Circle_Diameter=2.13422
    10  0.154751    0       0.000127467   circle Circle_Diameter=2.19141
    11  0.154751    0       -0.00287957   circle Circle_Diameter=2.22721
    12  0.154751    0       -0.00343889   circle Circle_Diameter=2.24147
    13  0.1515      0       -0.00332673   circle Circle_Diameter=2.2361
    14  0.159308    0       -0.00349816   circle Circle_Diameter=2.21142
    15  0.166433    0       -0.00365462   circle Circle_Diameter=2.16663
    16  0.172845    0       -0.00379543   circle Circle_Diameter=2.1016
    17  0.178518    0       -0.00391999   circle Circle_Diameter=2.01693
    18  0.183426    0       -0.00402776   circle Circle_Diameter=1.9139
    19  0.187548    0       -0.00411829   circle Circle_Diameter=1.79444
    20  0.190868    0       -0.00419117   circle Circle_Diameter=1.66106
    21  0.19337     0       -0.00424611   circle Circle_Diameter=1.51679
    22  0.195044    0       -0.00428287   circle Circle_Diameter=1.36503
    23  0.195882    0       -0.00430129   circle Circle_Diameter=1.20945
